/PREP7
K, , 0.075001, 0.0084431, 0.00
K, , 0.075433, 0.0084169, 0.00
K, , 0.075855, 0.0083361, 0.00
K, , 0.076268, 0.0082019, 0.00
K, , 0.07666, 0.0080177, 0.00
K, , 0.077023, 0.0077879, 0.00
K, , 0.077357, 0.007515, 0.00
K, , 0.077657, 0.0072012, 0.00
K, , 0.077915, 0.0068577, 0.00
K, , 0.078139, 0.0064644, 0.00
K, , 0.078293, 0.0059833, 0.00
K, , 0.078301, 0.0054988, 0.00
K, , 0.078301, 0.0051565, 0.00
K, , 0.0783, 0.0047826, 0.00
K, , 0.078301, 0.004399, 0.00
K, , 0.078299, 0.0040197, 0.00
K, , 0.0783, 0.0036502, 0.00
K, , 0.078301, 0.0032852, 0.00
K, , 0.078301, 0.0028617, 0.00
K, , 0.078153, 0.0021591, 0.00
K, , 0.077455, 0.0019756, 0.00
K, , 0.077028, 0.0019507, 0.00
K, , 0.076692, 0.0019069, 0.00
K, , 0.076424, 0.0018475, 0.00
K, , 0.076001, 0.0017071, 0.00
K, , 0.075555, 0.0017003, 0.00
K, , 0.075187, 0.0016998, 0.00
K, , 0.074814, 0.0017003, 0.00
K, , 0.074448, 0.001699, 0.00
K, , 0.073996, 0.0017098, 0.00
K, , 0.073534, 0.0018828, 0.00
K, , 0.073153, 0.0020904, 0.00
K, , 0.072804, 0.0023435, 0.00
K, , 0.072486, 0.0026394, 0.00
K, , 0.072209, 0.0029728, 0.00
K, , 0.071979, 0.0033369, 0.00
K, , 0.071817, 0.0036781, 0.00
K, , 0.071622, 0.0040033, 0.00
K, , 0.071409, 0.0042647, 0.00
K, , 0.071105, 0.0045762, 0.00
K, , 0.070854, 0.0048073, 0.00
K, , 0.070569, 0.0050899, 0.00
K, , 0.070303, 0.0054161, 0.00
K, , 0.070067, 0.0057705, 0.00
K, , 0.069861, 0.0061568, 0.00
K, , 0.069687, 0.006569, 0.00
K, , 0.069541, 0.0070186, 0.00
K, , 0.069443, 0.0075456, 0.00
K, , 0.069608, 0.0082416, 0.00
K, , 0.070202, 0.0086535, 0.00
K, , 0.070752, 0.0086985, 0.00
K, , 0.071302, 0.0086169, 0.00
K, , 0.071886, 0.0084614, 0.00
K, , 0.072392, 0.0083342, 0.00
K, , 0.072822, 0.0082472, 0.00
K, , 0.073167, 0.0081977, 0.00
K, , 0.07354, 0.0081831, 0.00
K, , 0.073871, 0.0082687, 0.00
K, , 0.074255, 0.008369, 0.00
K, , 0.075001, 0.0079431, 0.00
K, , 0.075371, 0.0079208, 0.00
K, , 0.07573, 0.0078519, 0.00
K, , 0.076084, 0.0077368, 0.00
K, , 0.07642, 0.0075788, 0.00
K, , 0.076731, 0.0073824, 0.00
K, , 0.077017, 0.0071484, 0.00
K, , 0.077275, 0.0068782, 0.00
K, , 0.077498, 0.006583, 0.00
K, , 0.077683, 0.0062599, 0.00
K, , 0.077799, 0.0059066, 0.00
K, , 0.077801, 0.0054988, 0.00
K, , 0.077801, 0.0051565, 0.00
K, , 0.0778, 0.0047826, 0.00
K, , 0.077801, 0.004399, 0.00
K, , 0.077799, 0.0040197, 0.00
K, , 0.0778, 0.0036502, 0.00
K, , 0.077801, 0.0032852, 0.00
K, , 0.077801, 0.0028655, 0.00
K, , 0.077795, 0.0025081, 0.00
K, , 0.077418, 0.0024742, 0.00
K, , 0.076983, 0.0024486, 0.00
K, , 0.076606, 0.0023995, 0.00
K, , 0.076284, 0.0023277, 0.00
K, , 0.075915, 0.0021997, 0.00
K, , 0.075555, 0.0022003, 0.00
K, , 0.075187, 0.0021998, 0.00
K, , 0.074814, 0.0022003, 0.00
K, , 0.074448, 0.002199, 0.00
K, , 0.07409, 0.0022008, 0.00
K, , 0.073745, 0.002336, 0.00
K, , 0.07342, 0.0025131, 0.00
K, , 0.073122, 0.0027292, 0.00
K, , 0.072849, 0.0029828, 0.00
K, , 0.072613, 0.0032675, 0.00
K, , 0.072417, 0.0035781, 0.00
K, , 0.072257, 0.0039152, 0.00
K, , 0.072032, 0.004289, 0.00
K, , 0.071781, 0.0045984, 0.00
K, , 0.071455, 0.004933, 0.00
K, , 0.071199, 0.005169, 0.00
K, , 0.070939, 0.0054267, 0.00
K, , 0.070705, 0.0057128, 0.00
K, , 0.070497, 0.0060259, 0.00
K, , 0.070313, 0.0063711, 0.00
K, , 0.070156, 0.0067436, 0.00
K, , 0.070024, 0.0071477, 0.00
K, , 0.069943, 0.007545, 0.00
K, , 0.070026, 0.0079669, 0.00
K, , 0.07036, 0.0081792, 0.00
K, , 0.070722, 0.0081994, 0.00
K, , 0.071197, 0.0081281, 0.00
K, , 0.071761, 0.0079774, 0.00
K, , 0.072281, 0.0078468, 0.00
K, , 0.072736, 0.0077547, 0.00
K, , 0.073127, 0.0076993, 0.00
K, , 0.073589, 0.0076855, 0.00
K, , 0.073994, 0.0077841, 0.00
K, , 0.074354, 0.007879, 0.00
!*************************************************************************************************
L,1,2
L,2,3
L,3,4
L,4,5
L,5,6
L,6,7
L,7,8
L,8,9
L,9,10
L,10,11
L,11,12
L,12,13
L,13,14
L,14,15
L,15,16
L,16,17
L,17,18
L,18,19
L,19,20
L,20,21
L,21,22
L,22,23
L,23,24
L,24,25
L,25,26
L,26,27
L,27,28
L,28,29
L,29,30
L,30,31
L,31,32
L,32,33
L,33,34
L,34,35
L,35,36
L,36,37
L,37,38
L,38,39
L,39,40
L,40,41
L,41,42
L,42,43
L,43,44
L,44,45
L,45,46
L,46,47
L,47,48
L,48,49
L,49,50
L,50,51
L,51,52
L,52,53
L,53,54
L,54,55
L,55,56
L,56,57
L,57,58
L,58,59
L,59,1
!*********************************************
L,60,61
L,61,62
L,62,63
L,63,64
L,64,65
L,65,66
L,66,67
L,67,68
L,68,69
L,69,70
L,70,71
L,71,72
L,72,73
L,73,74
L,74,75
L,75,76
L,76,77
L,77,78
L,78,79
L,79,80
L,80,81
L,81,82
L,82,83
L,83,84
L,84,85
L,85,86
L,86,87
L,87,88
L,88,89
L,89,90
L,90,91
L,91,92
L,92,93
L,93,94
L,94,95
L,95,96
L,96,97
L,97,98
L,98,99
L,99,100
L,100,101
L,101,102
L,102,103
L,103,104
L,104,105
L,105,106
L,106,107
L,107,108
L,108,109
L,109,110
L,110,111
L,111,112
L,112,113
L,113,114
L,114,115
L,115,116
L,116,117
L,117,118
L,118,60
!***************************************************************
AL,ALL
H=0.06
VOFFST,1,H, ,
!*
AIR_TEMP = 25
ET, 1, SOLID185, 0        !*   Element type
MPTEMP, 1, 25, 100
MP, REFT, 1, AIR_TEMP
MP, DENS, 1, 2.76E3
MP, PRXY, 1, 0.33
MP, ALPX, 1, -0.016
MP, ALPY, 1, -0.016
MP, ALPZ, 1, 0.014
MP, EX, 1, 76.0E9
TB, BISO, 1, 6, 2
TBTEMP, 25
TBDATA, , 3.14E8, 7.6E8
TBTEMP, 100
TBDATA, , 3.14E8, 7.6E8
!***************************************************************
KWPAVE,1
LAYER_DEFAULT = 0.006
H = 0.06
Layers = H/LAYER_DEFAULT
! should be odd numbers
!wpoff,0,0,-0.0025
!VSBW,1
*DO, DV, 2, Layers-1, 2
  wpoff,0,0,-1*LAYER_DEFAULT
  VSBW,1
  wpoff,0,0,-1*LAYER_DEFAULT
  VSBW,3
*ENDDO
!***************************************************************
*DO, MV, 1, Layers+1, 1
  *IF, MV, EQ, 3, CYCLE
  *ELSE
    CM,_Y,VOLU
    VSEL, , , ,       MV
    CM,_Y1,VOLU
    CHKMSH,'VOLU'
    CMSEL,S,_Y
    VSWEEP,_Y1
    CMDELE,_Y
    CMDELE,_Y1
    CMDELE,_Y2
*ENDDO
!SMRT,1
MSHAPE,1,3D
MSHKEY,0
CM,_Y,VOLU
VSEL, , , ,       Layers
!odd needs plus one while even does not
CM,_Y1,VOLU
CHKMSH,'VOLU'
CMSEL,S,_Y
VMESH,_Y1
CMDELE,_Y
CMDELE,_Y1
CMDELE,_Y2
!EREF,ALL, , ,2,0,1,1
!EREF,ALL, , ,1,0,1,1
!CMDELE,_Y1
!******************************************************************************
/PREP7
!EPLOT

LSCLEAR, ALL

KEYOPT, 1, 2, 1    ! Select the options of Solid 185

TREF, AIR_TEMP

NSEL, S, LOC, Z, -0.06

D, ALL, ALL      ! Fix the fixture

ALLSEL, ALL

FINISH
!***************************************************************
! MECHANICAL

/SOLU

! Solution enviorment setting starts

ANTYPE, STATIC    ! Quasistatic analysis

SOLCONTROL, ON    !  all control commends set earlier are reset to their original default values

NROPT, FULL, , ON    !  Use full Newton-Raphson solver

! NLGEOM, ON    ! Include large-defection effects in a static or transient analysis

OUTRES, ALL, 1    ! Output all the solutin items every substep of each load step

ALLSEL, ALL

LAYER_DEFAULT = 0.006

H = 0.06

DMSTEP = H/LAYER_DEFAULT

Layer = H/DMSTEP

! ESEL, ALL

! EALIVE, ALL

ESEL, S, CENT, Z, -0.06+layer, 0

EKILL, ALL

! ESEL, S, LIVE

NSLE, S, ALL

D, ALL, ALL

ALLSEL, ALL

*DO, IT, 1, DMSTEP, 1

  *IF, IT, EQ, 1, THEN

      NSEL, S, LOC, Z, -0.06

      DDELE, ALL, ALL

      ESEL, S, CENT, Z, -0.06, -0.06+Layer

      !EALIVE, ALL

      BFE, ALL, TEMP, , AIR_TEMP+1

  *ELSE

      ESEL, S, CENT, Z, (IT-1)*Layer-0.06, IT*Layer-0.06

      EALIVE, ALL

      BFE, ALL, TEMP, , AIR_TEMP+1

      NSLE, S

      DDELE, ALL, ALL

  *ENDIF

  ALLSEL, ALL

  SOLVE

*ENDDO

SAVE

FINISH
